*PART, NAME=Leaflet
*NODE, NSET=Leaflet_Nodes
1,-1.890750e-01,1.413066e+01,-1.499780e-01
2,1.717393e+01,7.615590e-01,2.124198e+00
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*NODE, NSET=Chordae_Nodes
24886,-1.200000e+01,2.000000e+00,-1.600000e+01
24887,-1.258599e+01,1.757739e+00,-1.492069e+01
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*ELEMENT, TYPE=C3D8R, ELSET=Septal_Leaflet_Elements
14089,20684,20668,21501,20688,467,454,1290,468
14090,21501,5209,20669,20688,1290,72,469,468
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*ELEMENT, TYPE=C3D8R, ELSET=Posterior_Leaflet_Elements
1,5816,5817,5818,5977,1676,1677,1678,1839
2,5815,5816,5977,5975,1675,1676,1839,1838
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*ELEMENT, TYPE=C3D8R, ELSET=Anterior_Leaflet_Elements
3705,12407,12499,12459,12406,4913,4949,4912,4856
3706,12408,12350,12413,12461,4914,4797,4864,4916
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*ELEMENT, TYPE=T3D2, ELSET=Chordae_Elements
18921, 24886, 24887
18922, 24887, 24888
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*NSET, NSET=Outer_Annular_Nodes
4978,4979,4980,4981,4982,4983
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*NSET, NSET=Outer_Free_Edge_Nodes
5142,5226,5227,5228,5229,5230
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*ELSET, ELSET=Outer_Septal_Leaflet_Elements
2779,2780,2781,2782,2783,2784
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*ELSET, ELSET=Outer_Posterior_Leaflet_Elements
11493,11494,11495,11496,11497,11498
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*ELSET, ELSET=Outer_Anterior_Leaflet_Elements
17713,17714,17715,17716,17717,17718
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*ELSET, ELSET=Inner_Septal_Leaflet_Elements
1,2,3,4,5,6
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*ELSET, ELSET=Inner_Posterior_Leaflet_Elements
3705,3706,3707,3708,3709,3710
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*ELSET, ELSET=Inner_Anterior_Leaflet_Elements
14089,14090,14091,14092,14093,14094
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*ELSET, ELSET=Posterior_Chordae
18921,18922,18923,18924,18925,18926
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*ELSET, ELSET=Septal_Chordae
18931,18932,18933,18934,18935,18936
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*ELSET, ELSET=Anterior_Chordae
18941,18942,18943,18944,18945,18946
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*Distribution, name=Ori-1-DiscOrient, location=ELEMENT, Table=Ori-1-DiscOrient_Table
,           1.,           0.,           0.,           0.,           1.,           0.
1,-0.815489,-0.578773,0.000000,0.000000,0.000000,1.000000
2,-0.815339,-0.578984,0.000000,0.000000,0.000000,1.000000
3,-0.815771,-0.578375,0.000000,0.000000,0.000000,1.000000
4,-0.815787,-0.578352,0.000000,0.000000,0.000000,1.000000
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3704,-0.316968,-0.948436,0.000000,0.000000,0.000000,1.000000
*Orientation, name=Ori-1, system=RECTANGULAR, local directions=2
Ori-1-DiscOrient
3, 0.
-0.681020,0.732265,0.0
-0.681020,-0.732265,0.0
*Solid Section, elset=POSTERIOR_LEAFLET_ELEMENTS, orientation=Ori-1, material=VUANISO_ISO_Posterior
,
*Distribution, name=Ori-3-DiscOrient, location=ELEMENT, Table=Ori-3-DiscOrient_Table
,           1.,           0.,           0.,           0.,           1.,           0.
3705,0.566715,-0.823914,-0.000000,0.000000,0.000000,1.000000
3706,0.608175,-0.793803,-0.000000,0.000000,0.000000,1.000000
3707,0.980601,0.196014,-0.000000,0.000000,0.000000,1.000000
3708,0.443132,0.896457,-0.000000,0.000000,0.000000,1.000000
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14088,0.226835,0.973933,-0.000000,0.000000,0.000000,1.000000
*Orientation, name=Ori-3, system=RECTANGULAR, local directions=2
Ori-3-DiscOrient
1, 0.
-1.000000,-0.000000,0.0
-1.000000,0.000000,0.0
*Solid Section, elset=ANTERIOR_LEAFLET_ELEMENTS, orientation=Ori-3, material=VUANISO_ISO_Anterior
,
*Distribution, name=Ori-2-DiscOrient, location=ELEMENT, Table=Ori-2-DiscOrient_Table
,           1.,           0.,           0.,           0.,           1.,           0.
14089,-0.994569,-0.104081,0.000000,0.000000,0.000000,1.000000
14090,-0.991573,-0.129551,0.000000,0.000000,0.000000,1.000000
14091,-0.986572,-0.163324,0.000000,0.000000,0.000000,1.000000
14092,-0.713372,0.700786,-0.000000,0.000000,0.000000,1.000000
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18920,-0.985077,-0.172117,0.000000,0.000000,0.000000,1.000000
*Orientation, name=Ori-2, system=RECTANGULAR, local directions=1
Ori-2-DiscOrient
3, 0.
1.000000,0.000000,0.0
*Solid Section, elset=SEPTAL_LEAFLET_ELEMENTS, orientation=Ori-2, material=VUANISO_ISO_Septal
,
*Solid Section, elset=Anterior_Chordae, material=Anterior_Chordae
0.330301,
*Solid Section, elset=Posterior_Chordae, material=Posterior_Chordae
0.31889,
*Solid Section, elset=Septal_Chordae, material=Septal_Chordae
0.398557,
*End Part
*Assembly, name=Valve_Assembly
*Instance, name=Leaflet_Instance, part=Leaflet
*End Instance
*Elset, elset=_LEAFLET_RIM_TIP_S3, internal, instance=LEAFLET_INSTANCE
805,806,807,808,809,810
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
*Elset, elset=_LEAFLET_RIM_TIP_S5, internal, instance=LEAFLET_INSTANCE
924,926,1850,1852,2776,2778,
3702,3704,6298,6300,8894,8896,
11490,11492,14086,14088,
*Surface, type=ELEMENT, name=LEAFLET_RIM_TIP
_LEAFLET_RIM_TIP_S3, S3
_LEAFLET_RIM_TIP_S5, S5
*Surface, type=ELEMENT, name=Leaflet_Surfaces_Outer
Leaflet_Instance.Outer_Anterior_Leaflet_Elements, S1
Leaflet_Instance.Outer_Posterior_Leaflet_Elements, S1
Leaflet_Instance.Outer_Septal_Leaflet_Elements, S1
*Surface, type=ELEMENT, name=Leaflet_Surfaces_Inner
Leaflet_Instance.Inner_Anterior_Leaflet_Elements, S2
Leaflet_Instance.Inner_Posterior_Leaflet_Elements, S2
Leaflet_Instance.Inner_Septal_Leaflet_Elements, S2
*Nset, nset=F_Set-1, instance=LEAFLET_INSTANCE
54
*Nset, nset=L_Set-1, instance=LEAFLET_INSTANCE
50
*Nset, nset=F_Set-2, instance=LEAFLET_INSTANCE
50
*Nset, nset=L_Set-2, instance=LEAFLET_INSTANCE
46
*Nset, nset=F_Set-3, instance=LEAFLET_INSTANCE
46
*Nset, nset=L_Set-3, instance=LEAFLET_INSTANCE
42
*Nset, nset=F_Set-4, instance=LEAFLET_INSTANCE
42
*Nset, nset=L_Set-4, instance=LEAFLET_INSTANCE
38
*Nset, nset=F_Set-5, instance=LEAFLET_INSTANCE
38
*Nset, nset=L_Set-5, instance=LEAFLET_INSTANCE
34
*Nset, nset=F_Set-6, instance=LEAFLET_INSTANCE
34
*Nset, nset=L_Set-6, instance=LEAFLET_INSTANCE
30
*MPC
LINK, F_Set-1, L_Set-1
*MPC
LINK, F_Set-2, L_Set-2
*MPC
LINK, F_Set-3, L_Set-3
*MPC
LINK, F_Set-4, L_Set-4
*MPC
LINK, F_Set-5, L_Set-5
*MPC
LINK, F_Set-6, L_Set-6
*End Assembly
*Distribution Table, name=Ori-1-DiscOrient_Table
coord3D, coord3D
*Distribution Table, name=Ori-3-DiscOrient_Table
coord3D, coord3D
*Distribution Table, name=Ori-2-DiscOrient_Table
coord3D, coord3D
*Amplitude, name=Amp-1, definition=SMOOTH STEP
0.5,  0.,  1.5,  1.
*Amplitude, name=Amp-2, definition=SMOOTH STEP
0.,  0.,  0.5,  1.
*Material, name=Anterior_Chordae
*Density
1e-9
*Hyperelastic, OGDEN, N=3
4.212040401935249, 50.429918536038890, 7.621400389279001, 0.016468374322372, 15.437445816336888, 50.430469783405819, 7.3584e-04, 0
  0.,
*Material, name=Posterior_Chordae
*Density
1e-9
*Hyperelastic, OGDEN, N=3
11.769785736240605, 49.080735360723722, 12.403984726216267, 49.080695323191264, 12.399238638580865, 49.080697291677922, 5.4868e-04, 0
  0.,
*Material, name=Septal_Chordae
*Density
1e-9
*Hyperelastic, OGDEN, N=3
43.040245810758144, 0.000113878800484, 0.000135787756161, 0.004100909221214, 0.000293121663589, 0.054406871730778, 4.6623e-04, 0
  0.,
*Material, name=VUANISO_ISO_Anterior
*Density
1e-09,
*anisotropic hyperelastic, user,formulation=invariant, local directions=1, type=compressible, properties=4
1.000000e-03,      20.0669, 1.188659e-04,     1.5260081e+01
*Material, name=VUANISO_ISO_Posterior
*Density
1e-09,
*anisotropic hyperelastic, user,formulation=invariant, local directions=1, type=compressible, properties=4
1.000000e-03,      20.0669, 2.204214e-04,     3.190703e+01
*Material, name=VUANISO_ISO_Septal
*Density
1e-09,
*anisotropic hyperelastic, user,formulation=invariant, local directions=1, type=compressible, properties=4
1.000000e-03,      20.0669, 1.984696e-04,     2.94597
*Surface Interaction, name=Interaction_Property
1.,
*Friction
0.001,
*Surface Behavior, pressure-overclosure=HARD
*Step, name="Annulus Approximation", nlgeom=YES
*Dynamic, Explicit
, 1.5
*Bulk Viscosity
0.5, 1.2
*VARIABLE MASS SCALING, TYPE=UNIFORM, FREQUENCY=10000, DT=5e-7
*Boundary,op=NEW,amplitude=Amp-2
Leaflet_Instance.30,1,1,-4.131151
Leaflet_Instance.30,2,2,-0.473161
Leaflet_Instance.30,3,3,1.328382
*Boundary,op=NEW,amplitude=Amp-2
Leaflet_Instance.25,1,1,-3.432330
Leaflet_Instance.25,2,2,0.023302
Leaflet_Instance.25,3,3,1.412151
*Boundary,op=NEW,amplitude=Amp-2
Leaflet_Instance.20,1,1,-2.866113
Leaflet_Instance.20,2,2,0.466887
Leaflet_Instance.20,3,3,1.398015
*Boundary,op=NEW,amplitude=Amp-2
Leaflet_Instance.15,1,1,-2.244695
Leaflet_Instance.15,2,2,1.278669
Leaflet_Instance.15,3,3,1.298840
*Boundary,op=NEW,amplitude=Amp-2
Leaflet_Instance.10,1,1,-1.809872
Leaflet_Instance.10,2,2,2.273794
Leaflet_Instance.10,3,3,1.051644
*Boundary,op=NEW,amplitude=Amp-2
Leaflet_Instance.1,1,1,-1.373475
Leaflet_Instance.1,2,2,3.277445
Leaflet_Instance.1,3,3,0.773738
*Boundary,op=NEW,amplitude=Amp-2
Leaflet_Instance.1,1,1,-1.373475
Leaflet_Instance.1,2,2,3.277445
Leaflet_Instance.1,3,3,0.773738
*Boundary,op=NEW,amplitude=Amp-2
Leaflet_Instance.1326,1,1,-1.483826
Leaflet_Instance.1326,2,2,3.814157
Leaflet_Instance.1326,3,3,0.407719
*Boundary,op=NEW,amplitude=Amp-2
Leaflet_Instance.1321,1,1,-1.615278
Leaflet_Instance.1321,2,2,4.162976
Leaflet_Instance.1321,3,3,0.124317
*Boundary,op=NEW,amplitude=Amp-2
Leaflet_Instance.1316,1,1,-1.606655
Leaflet_Instance.1316,2,2,4.189469
Leaflet_Instance.1316,3,3,-0.183801
*Boundary,op=NEW,amplitude=Amp-2
Leaflet_Instance.1311,1,1,-1.284922
Leaflet_Instance.1311,2,2,3.839373
Leaflet_Instance.1311,3,3,-0.446761
*Boundary,op=NEW,amplitude=Amp-2
Leaflet_Instance.1306,1,1,-0.408635
Leaflet_Instance.1306,2,2,3.047995
Leaflet_Instance.1306,3,3,-0.864006
*Boundary,op=NEW,amplitude=Amp-2
Leaflet_Instance.1300,1,1,1.118365
Leaflet_Instance.1300,2,2,1.998417
Leaflet_Instance.1300,3,3,-1.381817
*Boundary,op=NEW,amplitude=Amp-2
Leaflet_Instance.1295,1,1,3.147358
Leaflet_Instance.1295,2,2,1.092534
Leaflet_Instance.1295,3,3,-1.807968
*Boundary,op=NEW,amplitude=Amp-2
Leaflet_Instance.1291,1,1,5.138821
Leaflet_Instance.1291,2,2,0.776212
Leaflet_Instance.1291,3,3,-1.948101
*Boundary,op=NEW,amplitude=Amp-2
Leaflet_Instance.1291,1,1,5.138821
Leaflet_Instance.1291,2,2,0.776212
Leaflet_Instance.1291,3,3,-1.948101
*Boundary,op=NEW,amplitude=Amp-2
Leaflet_Instance.2370,1,1,5.905798
Leaflet_Instance.2370,2,2,1.770317
Leaflet_Instance.2370,3,3,-1.528480
*Boundary,op=NEW,amplitude=Amp-2
Leaflet_Instance.2365,1,1,6.876511
Leaflet_Instance.2365,2,2,2.926455
Leaflet_Instance.2365,3,3,-1.341680
*Boundary,op=NEW,amplitude=Amp-2
Leaflet_Instance.2360,1,1,7.484614
Leaflet_Instance.2360,2,2,4.127763
Leaflet_Instance.2360,3,3,-0.964209
*Boundary,op=NEW,amplitude=Amp-2
Leaflet_Instance.2355,1,1,7.806073
Leaflet_Instance.2355,2,2,5.305996
Leaflet_Instance.2355,3,3,-0.516886
*Boundary,op=NEW,amplitude=Amp-2
Leaflet_Instance.2350,1,1,7.876478
Leaflet_Instance.2350,2,2,6.433350
Leaflet_Instance.2350,3,3,-0.086256
*Boundary,op=NEW,amplitude=Amp-2
Leaflet_Instance.2345,1,1,7.702430
Leaflet_Instance.2345,2,2,7.457750
Leaflet_Instance.2345,3,3,0.341310
*Boundary,op=NEW,amplitude=Amp-2
Leaflet_Instance.2340,1,1,7.272869
Leaflet_Instance.2340,2,2,8.305451
Leaflet_Instance.2340,3,3,0.748789
*Boundary,op=NEW,amplitude=Amp-2
Leaflet_Instance.2335,1,1,6.621184
Leaflet_Instance.2335,2,2,8.948672
Leaflet_Instance.2335,3,3,1.125059
*Boundary,op=NEW,amplitude=Amp-2
Leaflet_Instance.2330,1,1,5.781043
Leaflet_Instance.2330,2,2,9.332464
Leaflet_Instance.2330,3,3,1.405364
*Boundary,op=NEW,amplitude=Amp-2
Leaflet_Instance.2325,1,1,4.828349
Leaflet_Instance.2325,2,2,9.382760
Leaflet_Instance.2325,3,3,1.475697
*Boundary,op=NEW,amplitude=Amp-2
Leaflet_Instance.2320,1,1,3.820532
Leaflet_Instance.2320,2,2,9.036516
Leaflet_Instance.2320,3,3,1.462314
*Boundary,op=NEW,amplitude=Amp-2
Leaflet_Instance.2315,1,1,2.894734
Leaflet_Instance.2315,2,2,8.333851
Leaflet_Instance.2315,3,3,1.280046
*Boundary,op=NEW,amplitude=Amp-2
Leaflet_Instance.2310,1,1,2.117059
Leaflet_Instance.2310,2,2,7.408518
Leaflet_Instance.2310,3,3,1.005421
*Boundary,op=NEW,amplitude=Amp-2
Leaflet_Instance.2305,1,1,1.505523
Leaflet_Instance.2305,2,2,6.381312
Leaflet_Instance.2305,3,3,0.647296
*Boundary,op=NEW,amplitude=Amp-2
Leaflet_Instance.2300,1,1,1.046356
Leaflet_Instance.2300,2,2,5.316218
Leaflet_Instance.2300,3,3,0.174559
*Boundary,op=NEW,amplitude=Amp-2
Leaflet_Instance.2295,1,1,0.691548
Leaflet_Instance.2295,2,2,4.278000
Leaflet_Instance.2295,3,3,-0.419906
*Boundary,op=NEW,amplitude=Amp-2
Leaflet_Instance.2290,1,1,0.402619
Leaflet_Instance.2290,2,2,3.261511
Leaflet_Instance.2290,3,3,-1.038893
*Boundary,op=NEW,amplitude=Amp-2
Leaflet_Instance.2285,1,1,0.162470
Leaflet_Instance.2285,2,2,2.255948
Leaflet_Instance.2285,3,3,-1.625472
*Boundary,op=NEW,amplitude=Amp-2
Leaflet_Instance.2280,1,1,-0.078534
Leaflet_Instance.2280,2,2,1.300289
Leaflet_Instance.2280,3,3,-2.071494
*Boundary,op=NEW,amplitude=Amp-2
Leaflet_Instance.2275,1,1,-0.187583
Leaflet_Instance.2275,2,2,0.320978
Leaflet_Instance.2275,3,3,-2.208450
*Boundary,op=NEW,amplitude=Amp-2
Leaflet_Instance.2270,1,1,-0.604464
Leaflet_Instance.2270,2,2,-0.497750
Leaflet_Instance.2270,3,3,-2.001710
*Boundary,op=NEW,amplitude=Amp-2
Leaflet_Instance.2,1,1,-0.616410
Leaflet_Instance.2,2,2,-1.233446
Leaflet_Instance.2,3,3,-1.450128
*Boundary,op=NEW,amplitude=Amp-2
Leaflet_Instance.24886,1,1,0.000000
Leaflet_Instance.24886,2,2,0.000000
Leaflet_Instance.24886,3,3,-14.000000
*Boundary,op=NEW,amplitude=Amp-2
Leaflet_Instance.24897,1,1,0.000000
Leaflet_Instance.24897,2,2,0.000000
Leaflet_Instance.24897,3,3,-14.000000
*Boundary,op=NEW,amplitude=Amp-2
Leaflet_Instance.24908,1,1,0.000000
Leaflet_Instance.24908,2,2,0.000000
Leaflet_Instance.24908,3,3,-14.000000
*Boundary,op=NEW,amplitude=Amp-2
Leaflet_Instance.25515,1,1,0.000000
Leaflet_Instance.25515,2,2,0.000000
Leaflet_Instance.25515,3,3,-14.000000
*Boundary,op=NEW,amplitude=Amp-2
Leaflet_Instance.25525,1,1,0.000000
Leaflet_Instance.25525,2,2,0.000000
Leaflet_Instance.25525,3,3,-14.000000
*Boundary,op=NEW,amplitude=Amp-2
Leaflet_Instance.25535,1,1,0.000000
Leaflet_Instance.25535,2,2,0.000000
Leaflet_Instance.25535,3,3,-14.000000
*Boundary,op=NEW,amplitude=Amp-2
Leaflet_Instance.25545,1,1,0.000000
Leaflet_Instance.25545,2,2,0.000000
Leaflet_Instance.25545,3,3,-14.000000
*Boundary,op=NEW,amplitude=Amp-2
Leaflet_Instance.25555,1,1,0.000000
Leaflet_Instance.25555,2,2,0.000000
Leaflet_Instance.25555,3,3,-14.000000
*Boundary,op=NEW,amplitude=Amp-2
Leaflet_Instance.25565,1,1,0.000000
Leaflet_Instance.25565,2,2,0.000000
Leaflet_Instance.25565,3,3,-14.000000
*Boundary,op=NEW,amplitude=Amp-2
Leaflet_Instance.25575,1,1,0.000000
Leaflet_Instance.25575,2,2,0.000000
Leaflet_Instance.25575,3,3,-14.000000
*Boundary,op=NEW,amplitude=Amp-2
Leaflet_Instance.25585,1,1,0.000000
Leaflet_Instance.25585,2,2,0.000000
Leaflet_Instance.25585,3,3,-14.000000
*Boundary,op=NEW,amplitude=Amp-2
Leaflet_Instance.25595,1,1,0.000000
Leaflet_Instance.25595,2,2,0.000000
Leaflet_Instance.25595,3,3,-14.000000
*Boundary,op=NEW,amplitude=Amp-2
Leaflet_Instance.25605,1,1,0.000000
Leaflet_Instance.25605,2,2,0.000000
Leaflet_Instance.25605,3,3,-14.000000
*Boundary,op=NEW,amplitude=Amp-2
Leaflet_Instance.25615,1,1,0.000000
Leaflet_Instance.25615,2,2,0.000000
Leaflet_Instance.25615,3,3,-14.000000
*Boundary,op=NEW,amplitude=Amp-2
Leaflet_Instance.25625,1,1,0.000000
Leaflet_Instance.25625,2,2,0.000000
Leaflet_Instance.25625,3,3,-14.000000
*Boundary,op=NEW,amplitude=Amp-2
Leaflet_Instance.25635,1,1,0.000000
Leaflet_Instance.25635,2,2,0.000000
Leaflet_Instance.25635,3,3,-14.000000
*Boundary,op=NEW,amplitude=Amp-2
Leaflet_Instance.25645,1,1,0.000000
Leaflet_Instance.25645,2,2,0.000000
Leaflet_Instance.25645,3,3,-14.000000
*Boundary,op=NEW,amplitude=Amp-2
Leaflet_Instance.25655,1,1,0.000000
Leaflet_Instance.25655,2,2,0.000000
Leaflet_Instance.25655,3,3,-14.000000
*Boundary,op=NEW,amplitude=Amp-2
Leaflet_Instance.25665,1,1,0.000000
Leaflet_Instance.25665,2,2,0.000000
Leaflet_Instance.25665,3,3,-14.000000
*Boundary,op=NEW,amplitude=Amp-2
Leaflet_Instance.25675,1,1,0.000000
Leaflet_Instance.25675,2,2,0.000000
Leaflet_Instance.25675,3,3,-14.000000
*Boundary,op=NEW,amplitude=Amp-2
Leaflet_Instance.25685,1,1,0.000000
Leaflet_Instance.25685,2,2,0.000000
Leaflet_Instance.25685,3,3,-14.000000
*Boundary,op=NEW,amplitude=Amp-2
Leaflet_Instance.25695,1,1,0.000000
Leaflet_Instance.25695,2,2,0.000000
Leaflet_Instance.25695,3,3,-14.000000
*Boundary,op=NEW,amplitude=Amp-2
Leaflet_Instance.25705,1,1,0.000000
Leaflet_Instance.25705,2,2,0.000000
Leaflet_Instance.25705,3,3,-14.000000
*Boundary,op=NEW,amplitude=Amp-2
Leaflet_Instance.25715,1,1,0.000000
Leaflet_Instance.25715,2,2,0.000000
Leaflet_Instance.25715,3,3,-14.000000
*Boundary,op=NEW,amplitude=Amp-2
Leaflet_Instance.25725,1,1,0.000000
Leaflet_Instance.25725,2,2,0.000000
Leaflet_Instance.25725,3,3,-14.000000
*Boundary,op=NEW,amplitude=Amp-2
Leaflet_Instance.25735,1,1,0.000000
Leaflet_Instance.25735,2,2,0.000000
Leaflet_Instance.25735,3,3,-14.000000
*Boundary,op=NEW,amplitude=Amp-2
Leaflet_Instance.25745,1,1,0.000000
Leaflet_Instance.25745,2,2,0.000000
Leaflet_Instance.25745,3,3,-14.000000
*Boundary,op=NEW,amplitude=Amp-2
Leaflet_Instance.25755,1,1,0.000000
Leaflet_Instance.25755,2,2,0.000000
Leaflet_Instance.25755,3,3,-14.000000
*Boundary,op=NEW,amplitude=Amp-2
Leaflet_Instance.25765,1,1,0.000000
Leaflet_Instance.25765,2,2,0.000000
Leaflet_Instance.25765,3,3,-14.000000
*Boundary,op=NEW,amplitude=Amp-2
Leaflet_Instance.25775,1,1,0.000000
Leaflet_Instance.25775,2,2,0.000000
Leaflet_Instance.25775,3,3,-14.000000
*Boundary,op=NEW,amplitude=Amp-2
Leaflet_Instance.25785,1,1,0.000000
Leaflet_Instance.25785,2,2,0.000000
Leaflet_Instance.25785,3,3,-14.000000
*Boundary,op=NEW,amplitude=Amp-2
Leaflet_Instance.25795,1,1,0.000000
Leaflet_Instance.25795,2,2,0.000000
Leaflet_Instance.25795,3,3,-14.000000
*Dsload,op=NEW,amplitude=Amp-1
Leaflet_Surfaces_OUTER, P, 0.00567
*Contact Pair, interaction=Interaction_Property,mechanical constraint=KINEMATIC, cpset=INTERACTION_PROPERTY-1-1
LEAFLET_SURFACES_INNER,
*Contact Pair, interaction=INTERACTION_PROPERTY, mechanical constraint=KINEMATIC, cpset=Int-3
LEAFLET_RIM_TIP,
*Contact, op=NEW
*Contact Inclusions
LEAFLET_RIM_TIP , LEAFLET_SURFACES_INNER
*Contact Property Assignment
 ,  , INTERACTION_PROPERTY
*Output, field, variable=PRESELECT
*Output, history, variable=PRESELECT
*Output, history
*Contact Output, cpset=INTERACTION_PROPERTY-1-1
CAREA,
*End Step
